*Heading
** Job name: ME759_Assign1_part_d_CourseMesh Model name: ME759_Assign1_Part_d_CPE4
** Generated by: Abaqus/CAE 2018
*Preprint, echo=NO, model=NO, history=NO, contact=NO
**
** PARTS
**
*Part, name=Part-1
*Node
      1,         0.75,          2.5
      2,           0.,          2.5
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*Element, type=CPE4
  1,   1,  12,  90,  31
  2,  12,  13,  91,  90
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*Nset, nset=Set-1, generate
   1,  233,    1
*Elset, elset=Set-1, generate
   1,  201,    1
** Section: Section-1
*Solid Section, elset=Set-1, material=Material-1
,
*End Part
**
**
** ASSEMBLY
**
*Assembly, name=Assembly
**
*Instance, name=Part-1-1, part=Part-1
*End Instance
**
*Elset, elset=Plate_NodesAlongXAxis,, instance=Part-1-1, unsorted, generate
 31,  48,   1
*Elset, elset=Plate_NodesAlongYAxis, instance=Part-1-1, unsorted
28,27,24,21,18,15,12,9,6,3
*Nset, nset=Plate_NodesAlongYAxis, instance=Part-1-1, unsorted
  5, 3, 21,20,19,18,17,16,15,14, 2
*Nset, nset=Plate_NodesAlongXAxis, instance=Part-1-1, unsorted
  7,  8, 34, 35, 36, 37
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*Nset, nset=BC1_Nodes, instance=Part-1-1
  7,  8,  9, 34, 35, 36
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*Elset, elset=BC1_Nodes, instance=Part-1-1, generate
 31,  48,   1
*Nset, nset=BC2_Nodes, instance=Part-1-1
  2,  3,  5, 14, 15, 16, 17, 18, 19, 20, 21
*Elset, elset=BC2_Nodes, instance=Part-1-1
  3,  6,  9, 12, 15, 18, 21, 24, 27, 28
*Elset, elset=_Surf-1_S2, internal, instance=Part-1-1
 48,
*Elset, elset=_Surf-1_S1, internal, instance=Part-1-1, generate
 49,  57,   1
*Surface, type=ELEMENT, name=Surf-1
_Surf-1_S2, S2
_Surf-1_S1, S1
*End Assembly
**
** MATERIALS
**
*Material, name=Material-1
*Elastic
100., 0.3
** ----------------------------------------------------------------
**
** STEP: Step-1
**
*Step, name=Step-1, nlgeom=NO
*Static
1., 1., 1e-05, 1.
**
** BOUNDARY CONDITIONS
**
** Name: BC-1 Type: Displacement/Rotation
*Boundary
BC1_Nodes, 2, 2
** Name: BC-2 Type: Displacement/Rotation
*Boundary
BC2_Nodes, 1, 1
**
** LOADS
**
** Name: Load-1   Type: Pressure
*Dsload
Surf-1, P, -1.
**
** OUTPUT REQUESTS
**
*Restart, write, frequency=0
**
** FIELD OUTPUT: F-Output-1
**
*Output, field, variable=PRESELECT
**
** HISTORY OUTPUT: H-Output-1
**
*Output, history, variable=PRESELECT
*node print
U
*EL PRINT, Elset=Plate_NodesAlongXAxis, POSITION=Nodes
S, E
*EL PRINT, Elset=Plate_NodesAlongYAxis, POSITION=Nodes
S, E
*End Step
*STEP
*MATRIX GENERATE,  STIFFNESS, LOAD
*MATRIX OUTPUT, STIFFNESS, LOAD, FORMAT=MATRIX INPUT
**
** LOADS
**
** Name: Load-1   Type: Pressure
*Dsload
Surf-1, P, -1.
*END STEP
