*Heading
** Job name: ME759_Assign1_part_d_CourseMesh Model name: ME759_Assign1_Part_d_CPE4
** Generated by: Abaqus/CAE 2018
*Preprint, echo=NO, model=NO, history=NO, contact=NO
*Node
      1,         0.75,          2.5
      2,           0.,          2.5
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*user element,type=U4, nodes=4, coordinates=2, properties=2, VARIABLES=40
1,2
*Element, type=U4, elset=plate_with_hole
  1,   1,  12,  90,  31
  2,  12,  13,  91,  90
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** E and nu for calculating De matrix
*uel property, elset=plate_with_hole
100.,0.3
*Nset, nset=Set-1, generate
   1,  233,    1
*Elset, elset=Set-1, generate
   1,  201,    1
*Nset, nset=Plate_NodesAlongXAxis
  7,  8,  9, 34, 35, 36
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*Elset, elset=Plate_NodesAlongXAxis, generate
 31,  48,   1
*Nset, nset=Plate_NodesAlongYAxis
  2,  3,  5, 14, 15, 16, 17, 18, 19, 20, 21
*Elset, elset=Plate_NodesAlongYAxis
  3,  6,  9, 12, 15, 18, 21, 24, 27, 28
**
*Nset, nset=BC1_Nodes
  7,  8,  9, 34, 35, 36
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*Elset, elset=BC1_Nodes, generate
 31,  48,   1
*Nset, nset=BC2_Nodes
  2,  3,  5, 14, 15, 16, 17, 18, 19, 20, 21
*Elset, elset=BC2_Nodes
  3,  6,  9, 12, 15, 18, 21, 24, 27, 28
** ----------------------------------------------------------------
**
** STEP: Step-1
**
*Step, name=Step-1, nlgeom=NO
*Static
1., 1., 1e-05, 1.
**
** BOUNDARY CONDITIONS
**
** Name: BC-1 Type: Displacement/Rotation
*Boundary
BC1_Nodes, 2, 2
** Name: BC-2 Type: Displacement/Rotation
*Boundary
BC2_Nodes, 1, 1
**
** LOADS
**
** Name: Load-1   Type: Pressure
*CLOAD, REAL
9,1,  1.250000000000000e-01
10,1,  2.500000000000000e-01
11,1,  1.250000000000000e-01
66,1,  2.500000000000000e-01
67,1,  2.500000000000000e-01
68,1,  2.500000000000000e-01
69,1,  2.500000000000000e-01
70,1,  2.500000000000000e-01
71,1,  2.500000000000000e-01
72,1,  2.500000000000000e-01
73,1,  2.500000000000000e-01
**
** OUTPUT REQUESTS
**
*Restart, write, frequency=0
**
** FIELD OUTPUT: F-Output-1
**
*Output, field, variable=PRESELECT
**
** HISTORY OUTPUT: H-Output-1
**
*Output, history, variable=PRESELECT
*node print
U
*EL PRINT, Elset=plate_with_hole, POSITION=INTEGRATION POINTS
 SDV1,  SDV2, SDV3, SDV4, SDV5, SDV6, SDV7, SDV8,
 SDV9, SDV10,SDV11,SDV12,SDV13,SDV14,SDV15,SDV16,
SDV17, SDV18,SDV19,SDV20,SDV21,SDV22,SDV23,SDV24,
SDV25, SDV26,SDV27,SDV28,SDV29,SDV30,SDV31,SDV32
*End Step
