*Heading
** Job name: ME759_Assign1_part_d_CPE4_FineMesh Model name: ME759_Assign1_Part_d_CPE4
** Generated by: Abaqus/CAE 2018
*Preprint, echo=NO, model=NO, history=NO, contact=NO
**
** PARTS
**
*Part, name=Part-1
*Node
      1,           2.,          2.5
      2,           0.,          2.5
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*Element, type=CPS4R
   1,    1,   12,  537,  109
   2,   12,   13,  538,  537
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*Nset, nset=Set-1, generate
    1,  5991,     1
*Elset, elset=Set-1, generate
    1,  5810,     1
*Nset, nset=Plate_NodesAlongXAxis
   7,   8,   9, 245, 246, 247
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*Elset, elset=Plate_NodesAlongXAxis
 1679, 1718, 1757, 1796, 1835, 1874
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*Nset, nset=Plate_NodesAlongYAxis
   2,   3,   5,  51,  52,  53
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*Elset, elset=Plate_NodesAlongYAxis
  40,  80, 120, 160, 200, 240
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*Nset, nset=Plate_NodesALongXAxis_nset, unsorted
   7, 245, 246, 247, 248, 249
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*Nset, nset=Plate_nodesAlongYAxis_nset, unsorted
   5, 138, 137, 136, 135, 134
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** Section: Section-1
*Solid Section, elset=Set-1, material=Material-1
,
*End Part
**
**
** ASSEMBLY
**
*Assembly, name=Assembly
**
*Instance, name=Part-1-1, part=Part-1
*End Instance
**
*Nset, nset=BC1_Nodes, instance=Part-1-1
   7,   8,   9, 245, 246, 247
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*Elset, elset=BC1_Nodes, instance=Part-1-1
 1679, 1718, 1757, 1796, 1835, 1874
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*Nset, nset=BC2_Nodes, instance=Part-1-1
   2,   3,   5,  51,  52,  53
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*Elset, elset=BC2_Nodes, instance=Part-1-1
  40,  80, 120, 160, 200, 240
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*Elset, elset=_Surf-1_S2, internal, instance=Part-1-1, generate
 2870,  5150,    60
*Elset, elset=_Surf-1_S1, internal, instance=Part-1-1, generate
 5151,  5161,     1
*Surface, type=ELEMENT, name=Surf-1
_Surf-1_S2, S2
_Surf-1_S1, S1
*End Assembly
**
** MATERIALS
**
*Material, name=Material-1
*Elastic
100., 0.3
** ----------------------------------------------------------------
**
** STEP: Step-1
**
*Step, name=Step-1, nlgeom=NO
*Static
1., 1., 1e-05, 1.
**
** BOUNDARY CONDITIONS
**
** Name: BC-1 Type: Displacement/Rotation
*Boundary
BC1_Nodes, 2, 2
** Name: BC-2 Type: Displacement/Rotation
*Boundary
BC2_Nodes, 1, 1
**
** LOADS
**
** Name: Load-1   Type: Pressure
*Dsload
Surf-1, P, -1.
**
** OUTPUT REQUESTS
**
*Restart, write, frequency=0
**
** FIELD OUTPUT: F-Output-1
**
*Output, field, variable=PRESELECT
**
** HISTORY OUTPUT: H-Output-1
**
*Output, history, variable=PRESELECT
*End Step
